<?xml version="1.0"?>
<!-- Generated by Aero-Matic v 0.8

     Inputs:
                horsepower: 240
                     pitch: fixed
            max engine rpm: 2400
        prop diameter (ft): 7.864 ft

     Outputs:
              max prop rpm:2400
                gear ratio:   1.0
                       Cp0:0.033614
                       Ct0:0.028908
       static thrust (lbs): 842.01
-->

<propeller name="gypsy_queen_prop">
  <ixx> 2.187 </ixx>
  <diameter unit="IN"> 88 </diameter>
  <numblades> 2 </numblades>
  <minpitch> 15 </minpitch>
  <maxpitch> 22 </maxpitch>
  <minrpm>   1500 </minrpm>
  <maxrpm>   2400 </maxrpm>
  <gearratio>1.0 </gearratio>

  <!-- table name="C_THRUST" type="internal">
     <tableData>
       0.0  0.0889
       0.1  0.0932
       0.2  0.0878
       0.3  0.0794
       0.4  0.0697
       0.5  0.0613
       0.6  0.0546
       0.7  0.0479
       0.8  0.0364
       0.9  0.0234
       1.0  0.00262
       1.2  -0.004
       1.4  -0.0085
     </tableData>
  </table -->


  <table name="C_THRUST" type="internal">
     <tableData>
                -10         0       15       25       35       45       55       65       90
      -0.2      -0.0741   0.0418   0.1519   0.1860   0.2050   0.2164   0.1994   0.1709   0.0000
       0.0      -0.1101   0.0000   0.1519   0.1860   0.2050   0.2184   0.2041   0.1709   0.0000
       0.2      -0.1235   -0.0380   0.1311   0.1822   0.2021   0.2184   0.2041   0.1709   0.0000
       0.4      -0.1235   -0.0882   0.0987   0.1804   0.1983   0.2164   0.2041   0.1709   0.0000
       0.6      -0.1235   -0.1235   0.0522   0.1623   0.1898   0.2108   0.2012   0.1709   0.0000
       0.8      -0.1235   -0.1235   0.0029   0.1215   0.1842   0.2032   0.2012   0.1709   0.0000
       1.0      -0.1235   -0.1235   -0.0494   0.0741   0.1766   0.1927   0.1994   0.1709   0.0000
       1.2      -0.1235   -0.1235   -0.1016   0.0228   0.1452   0.1860   0.1994   0.1709   0.0000
       1.4      -0.1235   -0.1235   -0.1235   -0.0333   0.1045   0.1832   0.1956   0.1709   0.0000
       1.6      -0.1235   -0.1235   -0.1235   -0.0844   0.0570   0.1766   0.1918   0.1709   0.0000
       1.8      -0.1235   -0.1235   -0.1235   -0.1235   0.0096   0.1519   0.1860   0.1709   0.0000
       2.0      -0.1235   -0.1235   -0.1235   -0.1235   -0.0380   0.1186   0.1853   0.1709   0.0000
       2.2      -0.1235   -0.1235   -0.1235   -0.1235   -0.0855   0.0855   0.1822   0.1709   0.0000
       2.4      -0.1235   -0.1235   -0.1235   -0.1235   -0.1235   0.0456   0.1488   0.1709   0.0000
       2.6      -0.1235   -0.1235   -0.1235   -0.1235   -0.1235   0.0058   0.0942   0.1519   0.0000
       2.8      -0.1235   -0.1235   -0.1235   -0.1235   -0.1235   -0.0342   0.0617   0.1235   0.0000
       3.0      -0.1235   -0.1235   -0.1235   -0.1235   -0.1235   -0.0741   0.0323   0.0949   0.0000
       3.2      -0.1235   -0.1235   -0.1235   -0.1235   -0.1235   -0.1139   0.0029   0.0665   0.0000
       3.4      -0.1235   -0.1235   -0.1235   -0.1235   -0.1235   -0.1235   -0.0266   0.0380   0.0000
       3.6      -0.1235   -0.1235   -0.1235   -0.1235   -0.1235   -0.1235   -0.0560   0.0096   0.0000
       3.8      -0.1235   -0.1235   -0.1235   -0.1235   -0.1235   -0.1235   -0.0855   -0.0190   0.0000
       4.0      -0.1235   -0.1235   -0.1235   -0.1235   -0.1235   -0.1235   -0.1148   -0.0475   0.0000
       6.0      -0.1235   -0.1235   -0.1235   -0.1235   -0.1235   -0.1235   -0.1235   -0.1235   0.0000
    </tableData>
  </table>


  <!-- table name="C_POWER" type="internal">
     <tableData>
       0.0  0.0536
       0.1  0.0546
       0.2  0.0528
       0.3  0.04970
       0.4  0.0453
       0.5  0.0427
       0.6  0.0404
       0.7  0.0363
       0.8  0.0304
       1.0  0.0192
       1.2  0.0099
       1.4  -0.00019
       1.6  -0.0508
     </tableData>
  </table -->

  <table name="C_POWER" type="internal">
     <tableData>
                -10        0       15       25       35       45       55        65        90
      -0.2      0.0157   0.0313   0.1097   0.2490   0.4295   0.6109   0.7048   0.7800   0.7800
       0.0      0.0627   0.0157   0.0940   0.2321   0.4107   0.6109   0.7077   0.7800   0.7800
       0.2      0.0893   0.0251   0.0909   0.2162   0.3928   0.6109   0.7077   0.7800   0.7800
       0.4      0.1203   0.0548   0.0783   0.1992   0.3731   0.6109   0.7077   0.7800   0.7800
       0.6      0.1475   0.0830   0.0517   0.1851   0.3496   0.5986   0.7048   0.7800   0.7800
       0.8      0.1739   0.1112   0.0157   0.1569   0.3289   0.5714   0.7048   0.7800   0.7800
       1.0      0.2002   0.1381   0.0157   0.1100   0.3101   0.5423   0.7020   0.7800   0.7800
       1.2      0.2274   0.1104   -0.0517   0.0423   0.2744   0.5197   0.6973   0.7800   0.7800
       1.4      0.2537   0.1908   -0.0780   -0.0313   0.2115   0.5122   0.6889   0.7800   0.7800
       1.6      0.2801   0.2180   -0.0912   -0.0940   0.1335   0.4981   0.6738   0.7518   0.7800
       1.8      0.3073   0.2443   -0.0940   -0.1569   0.0392   0.4417   0.6532   0.7359   0.7800
       2.0      0.3336   0.2707   -0.1203   -0.2190   -0.0470   0.3759   0.6221   0.7208   0.7800
       2.2      0.3599   0.2979   -0.1475   -0.2819   -0.1410   0.3054   0.6033   0.6889   0.7800
       2.4      0.3872   0.3242   -0.1739   -0.3449   -0.2349   0.2180   0.5855   0.6738   0.7800
       2.6      0.4135   0.3505   -0.2002   -0.4069   -0.2979   0.0912   0.5714   0.0650   0.7800
       2.8      0.4398   0.3778   -0.2274   -0.4699   -0.3571   -0.0310   0.5592   0.6419   0.7800
       3.0      0.4671   0.4041   -0.2537   -0.5329   -0.4229   -0.1410   0.5404   0.6419   0.7800
       3.2      0.4934   0.4304   -0.2801   -0.5949   -0.4859   -0.2509   0.5056   0.6268   0.7800
       3.4      0.5197   0.4577   -0.3073   -0.6579   -0.5479   -0.3599   0.3919   0.6109   0.7800
       3.6      0.5470   0.4840   -0.3336   -0.7208   -0.6109   -0.4699   0.2754   0.5949   0.7800
       3.8      0.5733   0.5103   -0.3599   -0.7800   -0.6738   -0.5798   0.1532   0.5761   0.7800
       4.0      0.5996   0.5376   -0.3872   -0.7800   -0.7800   -0.6889   0.0310   0.5329   0.7800
       6.0      0.7800   0.7800   -0.7800   -0.7800   -0.7800   -0.7800   -0.7800   -0.4699   0.7800
     </tableData>
  </table>

</propeller>
