<?xml version="1.0"?>
<?xml-stylesheet type="text/xsl" href="http://jsbsim.sourceforge.net/JSBSim.xsl"?>
<fdm_config name="unnamed" version="2.0" release="ALPHA"
   xmlns:xsi="http://www.w3.org/2001/XMLSchema-instance"
   xsi:noNamespaceSchemaLocation="http://jsbsim.sourceforge.net/JSBSim.xsd">

 <fileheader>
  <author> Aeromatic v 0.95 </author>
  <filecreationdate> 2012-03-07 </filecreationdate>
  <version> 0.2 </version>
  <description> Percival P16d Q6 </description>
 </fileheader>

<!--
  File:     Vickers_Nene_Viking.xml
  Inputs:
    name:          Percival P16d Q6
    type:          two-engine propeller light airliner
    max weight:    5700.0 lb
    wing span:     46.6 ft
    length:        32.3 ft
    wing area:     295.0 sq-ft
    gear type:     taildragger
    retractable?:  yes
    # engines:     2
    engine type:   piston/prop
    engine layout: underwing
    yaw damper?    no
  Outputs:
    wing loading:  32.5 lb/sq-ft
    CL-alpha:      4.4 per radian
    CL-0:          0.2
    CL-max:        1.62
    CD-0:          0.022
    K:             0.043

-->

 <metrics>
   <wingarea  unit="FT2">  295.00 </wingarea>
   <wingspan  unit="FT" >   46.66 </wingspan>
   <wing_incidence>          1.5 </wing_incidence>
   <chord     unit="FT" >   7.02 </chord>
   <htailarea unit="FT2">  85.00 </htailarea>
   <htailarm  unit="FT" >   17.85 </htailarm>
   <vtailarea unit="FT2">  31.00 </vtailarea>
   <vtailarm  unit="FT" >   19.6 </vtailarm>
   <location name="AERORP" unit="M">
     <x> -0.01 </x>
     <y>   0.00 </y>
     <z>   -0.27 </z>
   </location>
   <location name="EYEPOINT" unit="M">
     <x>  0.0 </x>
     <y>  0.00 </y>
     <z>  0.00 </z>
   </location>
   <location name="VRP" unit="M">
     <x>0</x>
     <y>0</y>
     <z>0</z>
   </location>
 </metrics>

 <mass_balance>
   <ixx unit="SLUG*FT2">    6100 </ixx>
   <iyy unit="SLUG*FT2">    4900 </iyy>
   <izz unit="SLUG*FT2">    10446 </izz>
   <emptywt unit="LBS" >     3600 </emptywt>
   <location name="CG" unit="M">
     <x> 0.010 </x>
     <y> 0.00 </y>
     <z> -0.104 </z>
   </location>


<pointmass name="Crew" >
      <weight unit="LBS"> 225 </weight>
      <location name="POINTMASS" unit = "M">
        <x> -0.935 </x>
        <y>  0.00 </y>
        <z> 0.210 </z>
      </location>
    </pointmass>

    <pointmass name="Cargo_1" >
      <weight unit="LBS"> 200 </weight>
      <location name="POINTMASS" unit = "M">
        <x>  -0.314 </x>
        <y>  0.00 </y>
        <z> -0.710 </z>
      </location>
    </pointmass>

   <pointmass name="passengers" >
      <weight unit="LBS"> 340 </weight>
      <location name="POINTMASS" unit = "M">
        <x>  1.29 </x>
        <y>  0.00 </y>
        <z> 0.210 </z>
      </location>
    </pointmass>

 </mass_balance>

 <ground_reactions>

  <contact type="BOGEY" name="LEFT_MAIN">
   <location unit="M">
     <x> -0.5682 </x>
     <y> -1.605 </y>
     <z> -1.629 </z>
   </location>
   <static_friction>  0.80 </static_friction>
   <dynamic_friction> 0.50 </dynamic_friction>
   <rolling_friction> 0.002 </rolling_friction>
   <spring_coeff unit="LBS/FT">      9600.00 </spring_coeff>
   <damping_coeff unit="LBS/FT/SEC"> 1004.00 </damping_coeff>
   <max_steer unit="DEG">0</max_steer>
   <brake_group>LEFT</brake_group>
   <retractable>1</retractable>
 </contact>

  <contact type="BOGEY" name="RIGHT_MAIN">
   <location unit="M">
     <x> -0.5682 </x>
     <y> 1.605 </y>
     <z> -1.629 </z>
   </location>
   <static_friction>  0.80 </static_friction>
   <dynamic_friction> 0.50 </dynamic_friction>
   <rolling_friction> 0.002 </rolling_friction>
   <spring_coeff unit="LBS/FT">      9600.00 </spring_coeff>
   <damping_coeff unit="LBS/FT/SEC"> 1004.00 </damping_coeff>
   <max_steer unit="DEG">0</max_steer>
   <brake_group>RIGHT</brake_group>
   <retractable>1</retractable>
 </contact>

  <contact type="BOGEY" name="TAIL">
   <location unit="M">
     <x> 6.192 </x>
     <y>   0.00 </y>
     <z>  -0.035 </z>
   </location>
   <static_friction>  0.80 </static_friction>
   <dynamic_friction> 0.50 </dynamic_friction>
   <rolling_friction> 0.002 </rolling_friction>
   <spring_coeff unit="LBS/FT">      5806.00 </spring_coeff>
   <damping_coeff unit="LBS/FT/SEC">  802.00 </damping_coeff>
   <max_steer unit="DEG"> -30.00 </max_steer>
   <brake_group>NONE</brake_group>
   <retractable>0</retractable>
 </contact>

  <contact type="STRUCTURE" name="LEFT_WING">
    <location unit="M">
     <x>  -0.027 </x>
     <y> -7.115 </y>
     <z> 0.478 </z>
    </location>
    <static_friction>  0.80 </static_friction>
    <dynamic_friction> 0.50 </dynamic_friction>
    <spring_coeff unit="LBS/FT">      27020.00 </spring_coeff>
    <damping_coeff unit="LBS/FT/SEC"> 8804.00 </damping_coeff>
 </contact>

  <contact type="STRUCTURE" name="RIGHT_WING">
    <location unit="M">
     <x>  -0.027 </x>
     <y> 7.115 </y>
     <z> 0.478 </z>
    </location>
    <static_friction>  0.80 </static_friction>
    <dynamic_friction> 0.50 </dynamic_friction>
    <spring_coeff unit="LBS/FT">      27020.00 </spring_coeff>
    <damping_coeff unit="LBS/FT/SEC"> 8804.00 </damping_coeff>
 </contact>

<contact type="STRUCTURE" name="NOSE">
    <location unit="M">
     <x>  -3.762 </x>
     <y> 0.0 </y>
     <z> 0.345 </z>
    </location>
    <static_friction>  0.80 </static_friction>
    <dynamic_friction> 0.50 </dynamic_friction>
    <spring_coeff unit="LBS/FT">      27020.00 </spring_coeff>
    <damping_coeff unit="LBS/FT/SEC"> 8804.00 </damping_coeff>
 </contact>

<contact type="STRUCTURE" name="TAIL_LOW">
    <location unit="M">
     <x> 6.87 </x>
     <y> 0.0 </y>
     <z> 0.178 </z>
    </location>
    <static_friction>  0.80 </static_friction>
    <dynamic_friction> 0.50 </dynamic_friction>
    <spring_coeff unit="LBS/FT">      27020.00 </spring_coeff>
    <damping_coeff unit="LBS/FT/SEC"> 8804.00 </damping_coeff>
 </contact>

<contact type="STRUCTURE" name="TAIL_HIGH">
    <location unit="M">
     <x> 6.87 </x>
     <y> 0.0 </y>
     <z> 2.94 </z>
    </location>
    <static_friction>  0.80 </static_friction>
    <dynamic_friction> 0.50 </dynamic_friction>
    <spring_coeff unit="LBS/FT">      27020.00 </spring_coeff>
    <damping_coeff unit="LBS/FT/SEC"> 8804.00 </damping_coeff>
 </contact>

 </ground_reactions>

 <propulsion>

   <engine file="gypsy_queen_II">
    <location unit="M">
      <x> -1.162 </x>
      <y> -1.8532 </y>
      <z> -0.0.62 </z>
    </location>
    <orient unit="DEG">
      <pitch> 0.00 </pitch>
      <roll>   0.00 </roll>
      <yaw>   0.00 </yaw>
    </orient>
    <feed>0</feed>
    <feed>1</feed>
    <feed>2</feed>
    <feed>3</feed>
    <thruster file="gypsy_queen_prop">
     <location unit="M">
       <x> -2.04 </x>
      <y> -1.8532 </y>
      <z>  -0.2806 </z>
     </location>
     <orient unit="DEG">
       <pitch> 0.00 </pitch>
       <roll>   0.00 </roll>
       <yaw>   0.00 </yaw>
     </orient>
     <sense> -1 </sense>
     <p_factor> 4 </p_factor>
    </thruster>
  </engine>

   <engine file="gypsy_queen_II">
    <location unit="M">
      <x> -1.162 </x>
      <y> 1.8532 </y>
      <z> -0.62 </z>
    </location>
    <orient unit="DEG">
      <pitch> 0.00 </pitch>
      <roll>   0.00 </roll>
      <yaw>   0.00 </yaw>
    </orient>
    <feed>0</feed>
    <feed>1</feed>
    <feed>2</feed>
    <feed>3</feed>
    <thruster file="gypsy_queen_prop">
     <location unit="M">
       <x> -2.04 </x>
      <y> 1.8532 </y>
      <z> -0.2806 </z>
     </location>
     <orient unit="DEG">
       <pitch> 0.00 </pitch>
       <roll>   0.00 </roll>
       <yaw>   0.00 </yaw>
     </orient>
     <sense> -1 </sense>
     <p_factor> 4 </p_factor>
    </thruster>
  </engine>

  <tank type="FUEL" number="0">
     <location unit="M">
       <x>   -0.08 </x>
       <y>   -0.806 </y>
       <z>  -0.58 </z>
     </location>
     <capacity unit="LBS"> 182.2 </capacity>
     <contents unit="LBS"> 90.0 </contents>
  </tank>

  <tank type="FUEL" number="1">
     <location unit="M">
       <x>  -0.08 </x>
       <y>  0.806 </y>
       <z>  0.034 </z>
     </location>
     <capacity unit="LBS"> 182.2 </capacity>
     <contents unit="LBS"> 90.0 </contents>
  </tank>

  <tank type="FUEL" number="2">
     <location unit="M">
       <x>  -0.05 </x>
       <y>  -1.91 </y>
       <z> 0.034 </z>
     </location>
     <capacity unit="LBS"> 182.2 </capacity>
     <contents unit="LBS"> 90.0 </contents>
  </tank>

<tank type="FUEL" number="3">
     <location unit="M">
       <x>  -0.05 </x>
       <y>  1.91 </y>
       <z> 0.034 </z>
     </location>
     <capacity unit="LBS"> 182.2 </capacity>
     <contents unit="LBS"> 90.0 </contents>
  </tank>

 </propulsion>

 <system file="crash-detect"/>
 <system file="percival-petrel-autopilot"/>
 <system file="electrical"/>
 <system file="instrumentation"/>

<fcs_function name="systems/engine/power-MP-curve">
          <function>
                <table>
                    <independentVar lookup="row">position/h-sl-ft</independentVar>
                    <independentVar lookup="column">/engines/engine/mp-inhg</independentVar>
                    <tableData>
                                    36      46      61      67       75
                            0       0.1340  0.1580  0.1930  0.3000  0.3170
                            5000    0.1470  0.1973  0.2320  0.2999  0.3390
                            10000   0.1610  0.2360  0.2710  0.3280  0.3610
                            15000   0.1960  0.2720  0.3170  0.3550  0.3830
                            20000   0.2720  0.3080  0.3610  0.3830  0.4050
                            25000   0.3100  0.3400  0.3900  0.4100  0.4300
                            30000   0.3400  0.3700  0.4200  0.4400  0.4600
                            35000   0.3700  0.4000  0.4500  0.4700  0.4900
                            40000   0.3900  0.4200  0.4700  0.5000  0.5200
                    </tableData>
                </table>
          </function>
          <output>propulsion/engine/bsfc-lbs_hphr</output>
        </fcs_function>

 <flight_control name="FCS: percival-petrel">

  <channel name="Pitch">
   <summer name="Pitch Trim Sum">
      <input>fcs/elevator-cmd-norm</input>
      <input>fcs/pitch-trim-cmd-norm</input>
      <clipto>
        <min> -1 </min>
        <max>  1 </max>
      </clipto>
   </summer>

   <aerosurface_scale name="Elevator Control">
      <input>fcs/pitch-trim-sum</input>
      <range>
        <min> -0.13 </min>
        <max>  0.13 </max>
      </range>
      <output>fcs/elevator-pos-rad</output>
   </aerosurface_scale>

   <aerosurface_scale name="elevator position normalized">
      <input>fcs/elevator-pos-deg</input>
      <domain>
        <min> -24 </min>
        <max>  24 </max>
      </domain>
      <range>
        <min> -1 </min>
        <max>  1 </max>
      </range>
      <output>fcs/elevator-pos-norm</output>
   </aerosurface_scale>

  </channel>

  <channel name="Roll">
   <summer name="Roll Trim Sum">
      <input>fcs/aileron-cmd-norm</input>
      <input>fcs/roll-trim-cmd-norm</input>
      <clipto>
        <min> -1 </min>
        <max>  1 </max>
      </clipto>
   </summer>

   <aerosurface_scale name="Left Aileron Control">
      <input>fcs/roll-trim-sum</input>
      <range>
        <min> -0.35 </min>
        <max>  0.35 </max>
      </range>
      <output>fcs/left-aileron-pos-rad</output>
   </aerosurface_scale>

   <aerosurface_scale name="Right Aileron Control">
      <input>fcs/roll-trim-sum</input>
      <range>
        <min> -0.35 </min>
        <max>  0.35 </max>
      </range>
      <output>fcs/right-aileron-pos-rad</output>
   </aerosurface_scale>

   <aerosurface_scale name="left aileron normalization">
      <input>fcs/left-aileron-pos-rad</input>
      <domain>
        <min> -0.26 </min>
        <max>  0.26 </max>
      </domain>
      <range>
        <min> -1 </min>
        <max>  1 </max>
      </range>
      <output>fcs/left-aileron-pos-norm</output>
   </aerosurface_scale>

   <aerosurface_scale name="right aileron normalization">
      <input>fcs/right-aileron-pos-rad</input>
      <domain>
        <min> -0.26 </min>
        <max>  0.26 </max>
      </domain>
      <range>
        <min> -1 </min>
        <max>  1 </max>
      </range>
      <output>fcs/right-aileron-pos-norm</output>
   </aerosurface_scale>

  </channel>

  <channel name="Yaw">
   <summer name="Rudder Command Sum">
      <input>fcs/rudder-cmd-norm</input>
      <input>fcs/yaw-trim-cmd-norm</input>
      <clipto>
        <min> -0.35 </min>
        <max>  0.35 </max>
      </clipto>
   </summer>

    <scheduled_gain name="Yaw Damper Rate">
      <input>velocities/r-aero-rad_sec</input>
      <table>
        <independentVar lookup="row">velocities/ve-kts</independentVar>
         <tableData>
            30     0.00
            60     2.00
         </tableData>
      </table>
   </scheduled_gain>

   <scheduled_gain name="Yaw Damper Beta">
      <input>aero/beta-rad</input>
      <table>
        <independentVar lookup="row">velocities/ve-kts</independentVar>
        <tableData>
           30     0.00
           60     0.00
        </tableData>
      </table>
   </scheduled_gain>

   <summer name="Yaw Damper Sum">
      <input>fcs/yaw-damper-beta</input>
      <input>fcs/yaw-damper-rate</input>
      <clipto>
        <min> -0.1 </min>
        <max>  0.1 </max>
      </clipto>
   </summer>

   <scheduled_gain name="Yaw Damper Final">
      <input>fcs/yaw-damper-sum</input>
      <table>
        <independentVar lookup="row">velocities/ve-kts</independentVar>
        <tableData>
           30         0.0
           31         1.0
        </tableData>
      </table>
   </scheduled_gain>

   <summer name="Rudder Sum">
      <input>fcs/rudder-command-sum</input>
      <input>fcs/yaw-damper-final</input>
      <clipto>
        <min> -1 </min>
        <max>  1 </max>
      </clipto>
   </summer>

   <aerosurface_scale name="Rudder Control">
      <input>fcs/rudder-sum</input>
      <range>
        <min> -0.35 </min>
        <max>  0.35 </max>
      </range>
      <output>fcs/rudder-pos-rad</output>
   </aerosurface_scale>

   <aerosurface_scale name="rudder normalization">
      <input>fcs/rudder-pos-rad</input>
      <domain>
        <min> -0.35 </min>
        <max>  0.35 </max>
      </domain>
      <range>
        <min> -1 </min>
        <max>  1 </max>
      </range>
      <output>fcs/rudder-pos-norm</output>
   </aerosurface_scale>

  </channel>

  <channel name="Flaps">
   <kinematic name="Flaps Control">
     <input>fcs/flap-cmd-norm</input>
     <traverse>
       <setting>
          <position>  0 </position>
          <time>      0 </time>
       </setting>
       <setting>
          <position> 15 </position>
          <time>      4 </time>
       </setting>
       <setting>
          <position> 30 </position>
          <time>      3 </time>
       </setting>
     </traverse>
     <output>fcs/flap-pos-deg</output>
   </kinematic>

   <aerosurface_scale name="flap normalization">
      <input>fcs/flap-pos-deg</input>
      <domain>
        <min>  0 </min>
        <max> 30 </max>
      </domain>
      <range>
        <min> 0 </min>
        <max> 1 </max>
      </range>
      <output>fcs/flap-pos-norm</output>
   </aerosurface_scale>

  </channel>

  <channel name="Landing Gear">
   <kinematic name="Gear Control">
     <input>gear/gear-cmd-norm</input>
     <traverse>
       <setting>
          <position> 0 </position>
          <time>     0 </time>
       </setting>
       <setting>
          <position> 1 </position>
          <time>     13 </time>
       </setting>
     </traverse>
     <output>gear/gear-pos-norm</output>
   </kinematic>

  </channel>

  <channel name="Speedbrake">
   <kinematic name="Speedbrake Control">
     <input>fcs/speedbrake-cmd-norm</input>
     <traverse>
       <setting>
          <position> 0 </position>
          <time>     0 </time>
       </setting>
       <setting>
          <position> 1 </position>
          <time>     1 </time>
       </setting>
     </traverse>
     <output>fcs/speedbrake-pos-norm</output>
   </kinematic>

  </channel>

 </flight_control>

 <aerodynamics>

<function name="aero/qbar_tail-psf">
      <description>Thrust tube effects at tail</description>
      <sum>
          <property>aero/qbar-psf</property>
          <product>
            <property>forces/fbx-prop-lbs</property>
            <value>0.0018</value>
          </product>
      </sum>
    </function>

<alphalimits unit="DEG">
   <min>-8.0</min>
   <max>16.0</max>
  </alphalimits>

  <hysteresis_limits unit="DEG">
   <min> 15.0</min>
   <max>19.0</max>
  </hysteresis_limits>

 <function name="aero/function/ground-effect-factor-lift">
   <description>Change in lift due to ground effect factor</description>
   <product>
    <table>
     <independentVar lookup="row">aero/h_b-mac-ft</independentVar>
     <tableData>
        0.0  1.507
        0.1  1.407
        0.15 1.355
        0.2  1.289
        0.3  1.206
        0.4  1.185
        0.5  1.059
        0.6  1.03
        0.7  1.018
        0.8  1.006
        0.9  1.003
        1.0  1.002
        1.1  1.0
     </tableData>
    </table>
   </product>
  </function>

  <function name="aero/function/ground-effect-factor-drag">
   <description>Change in drag due to ground effect</description>
   <product>
    <table>
     <independentVar lookup="row">aero/h_b-mac-ft</independentVar>
     <tableData>
        0.0  0.580
        0.1  0.615
        0.15 0.69
        0.2  0.759
        0.3  0.815
        0.4  0.882
        0.5  0.928
        0.6  0.962
        0.7  0.988
        0.8  1.0
        0.9  1.0
        1.0  1.0
        1.1  1.0
     </tableData>
    </table>
   </product>
  </function>

    <axis name="LIFT">

            <function name="aero/coefficient/CLalpha">
            <description>Lift_due_to_alpha</description>
            <product>
            <property>aero/qbar-psf</property>
            <property>metrics/Sw-sqft</property>
            <table>
            <independentVar lookup="row">aero/alpha-rad</independentVar>
                     <tableData>
                             -0.2793        -1.098
                             -0.1396        -0.48
                             -0.1047        -0.224
                             -0.0698        -0.104
                             -0.0349        -0.0081
                              0.000         0.180
                              0.01745       0.235
                              0.03491       0.350
                              0.0523        0.474
                              0.06981       0.681
                              0.1047         0.855
                              0.1396         0.991
                              0.1745         1.16
                              0.1918         1.29
                              0.2443         1.335
                              0.2793         1.409
                              0.3142         1.308
                              0.3316         1.214
                              0.3491         1.091
                              0.3665         0.837
                              0.3840         0.6031
                              0.436         0.4785
                          </tableData>
                       </table>
                      </product>
                    </function>

       <function name="aero/coefficient/dCLflap">
        <description>Delta_Lift_due_to_flaps</description>
        <product>
          <property>aero/qbar-psf</property>
          <property>metrics/Sw-sqft</property>
          <table>
            <independentVar>fcs/flap-pos-deg</independentVar>
            <tableData>
               0.0000  0.0000
              15.0000  0.310
              30.0000  0.4000
            </tableData>
          </table>
        </product>
      </function>

    <function name="aero/force/Lift_speedbrake">
       <description>Delta Lift due to speedbrake</description>
       <product>
           <property>aero/qbar-psf</property>
           <property>metrics/Sw-sqft</property>
           <property>fcs/speedbrake-pos-norm</property>
           <value>0</value>
       </product>
    </function>

    <function name="aero/force/Lift_elevator">
       <description>Lift due to Elevator Deflection</description>
       <product>
           <property>aero/qbar-psf</property>
           <property>metrics/Sw-sqft</property>
           <property>fcs/elevator-pos-rad</property>
           <value>0.23</value>
       </product>
    </function>

  </axis>

  <axis name="DRAG">

    <function name="aero/force/Drag_basic">
       <description>Drag at zero lift</description>
       <product>
          <property>aero/qbar-psf</property>
          <property>metrics/Sw-sqft</property>
          <table>
            <independentVar lookup="row">aero/alpha-rad</independentVar>
                          <tableData>
                       -1.5700	  1.500
                       -0.280         0.794
                       -0.140         0.301
                       -0.105         0.079
                       -0.070         0.031
                       -0.035         0.0108
                        0.000         0.0098
                        0.035         0.0113
                        0.087         0.0154
                        0.104         0.0259
                        0.157         0.0324
                        0.174         0.0549
                        0.209         0.0703
                        0.244         0.0996
                        0.279         0.1397
                        0.314         0.237
                        0.332         0.305
                        0.349         0.496
                        0.366         0.692
                        0.384         1.0910
                        0.419         1.294
                        1.570   	  1.5000
              </tableData>
          </table>
       </product>
    </function>

    <function name="aero/force/Drag_induced">
       <description>Induced drag</description>
         <product>
           <property>aero/qbar-psf</property>
           <property>metrics/Sw-sqft</property>
           <property>aero/cl-squared</property>
           <value>0.042</value>
         </product>
    </function>

    <function name="aero/force/Drag_mach">
       <description>Drag due to mach</description>
        <product>
          <property>aero/qbar-psf</property>
          <property>metrics/Sw-sqft</property>
          <table>
            <independentVar lookup="row">velocities/mach</independentVar>
            <tableData>
                0.00      0.000
                0.89      0.001
                1.10      0.010
                1.80      0.012
            </tableData>
          </table>
        </product>
    </function>

    <function name="aero/force/Drag_flap">
       <description>Drag due to flaps</description>
         <product>
           <property>aero/qbar-psf</property>
           <property>metrics/Sw-sqft</property>
           <property>fcs/flap-pos-deg</property>
           <value> 0.0018 </value>
         </product>
    </function>

    <function name="aero/force/Drag_gear">
       <description>Drag due to gear</description>
         <product>
           <property>aero/qbar-psf</property>
           <property>metrics/Sw-sqft</property>
           <property>gear/gear-pos-norm</property>
           <value>0.024</value>
         </product>
    </function>

    <function name="aero/force/Drag_speedbrake">
       <description>Drag due to speedbrakes</description>
         <product>
           <property>aero/qbar-psf</property>
           <property>metrics/Sw-sqft</property>
           <property>fcs/speedbrake-pos-norm</property>
           <value>0.00</value>
         </product>
    </function>

    <function name="aero/force/Drag_beta">
       <description>Drag due to sideslip</description>
       <product>
          <property>aero/qbar-psf</property>
          <property>metrics/Sw-sqft</property>
          <table>
            <independentVar lookup="row">aero/beta-rad</independentVar>
            <tableData>
              -1.57       1.20
              -0.26    0.072
               0.00       0.000
               0.26    0.072
               1.57       1.20
            </tableData>
          </table>
       </product>
    </function>

    <function name="aero/force/Drag_elevator">
       <description>Drag due to Elevator Deflection</description>
       <product>
           <property>aero/qbar-psf</property>
           <property>metrics/Sw-sqft</property>
           <abs><property>fcs/elevator-pos-norm</property></abs>
           <value>0.04</value>
       </product>
    </function>

  </axis>

  <axis name="SIDE">

    <function name="aero/force/Side_beta">
       <description>Side force due to beta</description>
       <product>
           <property>aero/qbar-psf</property>
           <property>metrics/Sw-sqft</property>
           <property>aero/beta-rad</property>
           <value>-1.10</value>
       </product>
    </function>

  </axis>

  <axis name="ROLL">

    <function name="aero/moment/Roll_beta">
       <description>Roll moment due to beta</description>
       <product>
           <property>aero/qbar-psf</property>
           <property>metrics/Sw-sqft</property>
           <property>metrics/bw-ft</property>
           <property>aero/beta-rad</property>
           <value>-0.08</value>
       </product>
    </function>

    <function name="aero/moment/Roll_damp">
       <description>Roll moment due to roll rate</description>
       <product>
           <property>aero/qbar-psf</property>
           <property>metrics/Sw-sqft</property>
           <property>metrics/bw-ft</property>
           <property>aero/bi2vel</property>
           <property>velocities/p-aero-rad_sec</property>
           <value>-0.47</value>
       </product>
    </function>

    <function name="aero/moment/Roll_yaw">
       <description>Roll moment due to yaw rate</description>
       <product>
           <property>aero/qbar-psf</property>
           <property>metrics/Sw-sqft</property>
           <property>metrics/bw-ft</property>
           <property>aero/bi2vel</property>
           <property>velocities/r-aero-rad_sec</property>
           <value>0.012</value>
       </product>
    </function>

    <function name="aero/moment/Roll_aileron">
       <description>Roll moment due to aileron</description>
       <product>
          <property>aero/qbar-psf</property>
          <property>metrics/Sw-sqft</property>
          <property>metrics/bw-ft</property>
          <property>fcs/left-aileron-pos-rad</property>
          <table>
            <independentVar lookup="row">velocities/mach</independentVar>
            <tableData>
              0.0    0.100
              2.0    0.033
            </tableData>
          </table>
       </product>
    </function>

    <function name="aero/moment/Roll_rudder">
       <description>Roll moment due to rudder</description>
       <product>
           <property>aero/qbar-psf</property>
           <property>metrics/Sw-sqft</property>
           <property>metrics/bw-ft</property>
           <property>fcs/rudder-pos-rad</property>
           <value>-0.003</value>
       </product>
    </function>

  </axis>

  <axis name="PITCH">

           <function name="aero/coefficient/Cmflap">
                <description>Pitch_moment_due_to_flaps</description>
                <product>
                    <property>aero/qbar-psf</property>
                    <property>metrics/Sw-sqft</property>
                    <property>metrics/cbarw-ft</property>
                    <property>fcs/flap-pos-norm</property>
                    <value>-0.012</value>
                </product>
            </function>

      <function name="aero/coefficient/Cmgear">
        <description>Pitch_moment_due_to_gear</description>
                <product>
                    <property>aero/qbar-psf</property>
                    <property>metrics/Sw-sqft</property>
                    <property>metrics/cbarw-ft</property>
                    <property>gear/gear-pos-norm</property>
                    <value>-0.0085</value>
                </product>
            </function>

    <function name="aero/moment/Pitch_alpha">
       <description>Pitch moment due to alpha</description>
       <product>
           <property>aero/qbar-psf</property>
           <property>metrics/Sw-sqft</property>
           <property>metrics/cbarw-ft</property>
           <property>aero/alpha-rad</property>
           <value>-0.60</value>
       </product>
    </function>

    <function name="aero/moment/Pitch_elevator">
       <description>Pitch moment due to elevator</description>
       <product>
          <property>aero/qbar-psf</property>
          <property>metrics/Sw-sqft</property>
          <property>metrics/cbarw-ft</property>
          <property>fcs/elevator-pos-rad</property>
          <table>
            <independentVar lookup="row">velocities/mach</independentVar>
            <tableData>
              0.0     -1.200
              2.0     -0.300
            </tableData>
          </table>
       </product>
    </function>

    <function name="aero/moment/Pitch_damp">
       <description>Pitch moment due to pitch rate</description>
       <product>
           <property>aero/qbar-psf</property>
           <property>metrics/Sw-sqft</property>
           <property>metrics/cbarw-ft</property>
           <property>aero/ci2vel</property>
           <property>velocities/q-aero-rad_sec</property>
           <value>-18</value>
       </product>
    </function>

    <function name="aero/moment/Pitch_alphadot">
       <description>Pitch moment due to alpha rate</description>
       <product>
           <property>aero/qbar-psf</property>
           <property>metrics/Sw-sqft</property>
           <property>metrics/cbarw-ft</property>
           <property>aero/ci2vel</property>
           <property>aero/alphadot-rad_sec</property>
           <value>-3</value>
       </product>
    </function>

  </axis>

  <axis name="YAW">

    <function name="aero/moment/Yaw_beta">
       <description>Yaw moment due to beta</description>
       <product>
           <property>aero/qbar-psf</property>
           <property>metrics/Sw-sqft</property>
           <property>metrics/bw-ft</property>
           <property>aero/beta-rad</property>
           <value>0.12</value>
       </product>
    </function>

    <function name="aero/moment/Yaw_damp">
       <description>Yaw moment due to yaw rate</description>
       <product>
           <property>aero/qbar-psf</property>
           <property>metrics/Sw-sqft</property>
           <property>metrics/bw-ft</property>
           <property>aero/bi2vel</property>
           <property>velocities/r-aero-rad_sec</property>
           <value>-0.14</value>
       </product>
    </function>

    <function name="aero/moment/Yaw_rudder">
       <description>Yaw moment due to rudder</description>
       <product>
           <property>aero/qbar-psf</property>
           <property>metrics/Sw-sqft</property>
           <property>metrics/bw-ft</property>
           <property>fcs/rudder-pos-rad</property>
           <value>-0.13</value>
       </product>
    </function>

    <function name="aero/moment/Yaw_aileron">
       <description>Adverse yaw</description>
       <product>
           <property>aero/qbar-psf</property>
           <property>metrics/Sw-sqft</property>
           <property>metrics/bw-ft</property>
           <property>fcs/left-aileron-pos-rad</property>
           <value>-0.017</value>
       </product>
    </function>

  </axis>

 </aerodynamics>

</fdm_config>
